OpenVSP model (file version 5), 5 components.
Geometry view with OpenVSP parameter names; values to 6 digits, angles in degrees, lengths in the model's unit.

Fuselage ""
  location (X Y Z) 0 0 0, rotation 90 0 0
  Design: Length=977.895
  cross sections:
    n   XLocPercent  YLocPercent  ZLocPercent   shape
    0   0            -0.0697829   1.01798e-05   rounded rectangle RoundRectXSec_Radius=0.25961 RoundedRect_Height=0.602576 RoundedRect_Width=0.637856
    1   0.00015      -0.0697829   1.01798e-05   rounded rectangle RoundRectXSec_Radius=1.55766 RoundedRect_Height=3.61546 RoundedRect_Width=3.82713
    2   0.0005       -0.0697829   1.01798e-05   rounded rectangle RoundRectXSec_Radius=3.37493 RoundedRect_Height=7.83349 RoundedRect_Width=8.29212
    3   0.0012       -0.0697829   1.01798e-05   rounded rectangle RoundRectXSec_Radius=5.97103 RoundedRect_Height=13.8592 RoundedRect_Width=14.6707
    4   0.00225      -0.0697829   1.01798e-05   rounded rectangle RoundRectXSec_Radius=8.82675 RoundedRect_Height=20.4876 RoundedRect_Width=21.6871
    5   0.0036       -0.0697829   1.01798e-05   rounded rectangle RoundRectXSec_Radius=11.1632 RoundedRect_Height=25.9108 RoundedRect_Width=27.4278
    6   0.0045       -0.0697829   1.01798e-05   rounded rectangle RoundRectXSec_Radius=12.4613 RoundedRect_Height=28.9236 RoundedRect_Width=30.6171
    7   0.005        -0.0697829   1.01798e-05   rounded rectangle RoundRectXSec_Radius=12.9805 RoundedRect_Height=30.1288 RoundedRect_Width=31.8928
    8   0.0253061    -0.0702996   -2.57098e-06  rounded rectangle RoundRectXSec_Radius=18.8152 RoundedRect_Height=69.294 RoundedRect_Width=53.604
    9   0.0456122    -0.0712647   -4.26482e-06  rounded rectangle RoundRectXSec_Radius=19.5003 RoundedRect_Height=103.469 RoundedRect_Width=68.5169
    10  0.0659184    -0.0721132   -9.11047e-07  rounded rectangle RoundRectXSec_Radius=20.0775 RoundedRect_Height=133.922 RoundedRect_Width=82.4376
    11  0.0862245    -0.0729113   -7.15004e-07  rounded rectangle RoundRectXSec_Radius=20.6338 RoundedRect_Height=161.061 RoundedRect_Width=95.4704
    12  0.106531     -0.0736841   -9.77174e-07  rounded rectangle RoundRectXSec_Radius=21.1295 RoundedRect_Height=185.242 RoundedRect_Width=107.646
    13  0.126837     -0.0744329   -2.20421e-06  rounded rectangle RoundRectXSec_Radius=21.608 RoundedRect_Height=206.735 RoundedRect_Width=118.974
    14  0.147143     -0.0751689   -2.52943e-06  rounded rectangle RoundRectXSec_Radius=22.0291 RoundedRect_Height=225.755 RoundedRect_Width=129.469
    15  0.167449     -0.0758896   -1.43023e-06  rounded rectangle RoundRectXSec_Radius=22.4313 RoundedRect_Height=242.465 RoundedRect_Width=139.161
    16  0.187755     -0.0766078   1.14365e-06   rounded rectangle RoundRectXSec_Radius=22.7858 RoundedRect_Height=256.998 RoundedRect_Width=148.058
    17  0.208061     -0.0773094   -1.89508e-06  rounded rectangle RoundRectXSec_Radius=23.132 RoundedRect_Height=269.474 RoundedRect_Width=156.16
    18  0.228367     -0.0779969   -9.9037e-07   rounded rectangle RoundRectXSec_Radius=23.4849 RoundedRect_Height=279.995 RoundedRect_Width=163.497
    19  0.248673     -0.0786827   -7.61105e-07  rounded rectangle RoundRectXSec_Radius=23.7288 RoundedRect_Height=288.598 RoundedRect_Width=170.036
    20  0.26898      -0.0793196   -2.21778e-06  rounded rectangle RoundRectXSec_Radius=23.9819 RoundedRect_Height=295.36 RoundedRect_Width=175.907
    21  0.289286     -0.0797846   -7.61749e-07  rounded rectangle RoundRectXSec_Radius=24.214 RoundedRect_Height=300.334 RoundedRect_Width=181.333
    22  0.309592     -0.0800569   -3.75489e-07  rounded rectangle RoundRectXSec_Radius=24.5033 RoundedRect_Height=303.55 RoundedRect_Width=186.387
    23  0.329898     -0.0801429   -1.43823e-07  rounded rectangle RoundRectXSec_Radius=24.7382 RoundedRect_Height=304.987 RoundedRect_Width=191.074
    24  0.350204     -0.0800011   -1.07991e-09  rounded rectangle RoundRectXSec_Radius=24.8554 RoundedRect_Height=305.013 RoundedRect_Width=195.329
    25  0.37051      -0.0796841   -2.73704e-08  rounded rectangle RoundRectXSec_Radius=24.9487 RoundedRect_Height=304.852 RoundedRect_Width=199.251
    26  0.390816     -0.0791863   6.10972e-07   rounded rectangle RoundRectXSec_Radius=25.017 RoundedRect_Height=304.707 RoundedRect_Width=202.814
    27  0.411122     -0.0785031   2.38338e-08   rounded rectangle RoundRectXSec_Radius=25.1107 RoundedRect_Height=304.587 RoundedRect_Width=206.016
    28  0.431429     -0.0776291   7.31528e-08   rounded rectangle RoundRectXSec_Radius=25.1898 RoundedRect_Height=304.487 RoundedRect_Width=208.842
    29  0.451735     -0.0765662   -1.9631e-08   rounded rectangle RoundRectXSec_Radius=25.2692 RoundedRect_Height=304.41 RoundedRect_Width=211.297
    30  0.472041     -0.07541     -4.16571e-07  rounded rectangle RoundRectXSec_Radius=25.3523 RoundedRect_Height=304.343 RoundedRect_Width=213.569
    31  0.492347     -0.0742494   -7.7827e-07   rounded rectangle RoundRectXSec_Radius=25.4526 RoundedRect_Height=304.279 RoundedRect_Width=215.833
    32  0.512653     -0.0730885   -5.85165e-07  rounded rectangle RoundRectXSec_Radius=25.5554 RoundedRect_Height=304.215 RoundedRect_Width=218.098
    33  0.532959     -0.0719283   -1.30594e-07  rounded rectangle RoundRectXSec_Radius=25.6383 RoundedRect_Height=304.148 RoundedRect_Width=220.363
    34  0.553265     -0.070766    6.76676e-08   rounded rectangle RoundRectXSec_Radius=25.6983 RoundedRect_Height=304.078 RoundedRect_Width=222.631
    35  0.573571     -0.0703648   -4.79948e-08  rounded rectangle RoundRectXSec_Radius=25.682 RoundedRect_Height=304.005 RoundedRect_Width=223.4
    36  0.593878     -0.0703588   -6.10268e-08  rounded rectangle RoundRectXSec_Radius=25.5851 RoundedRect_Height=303.92 RoundedRect_Width=223.396
    37  0.614184     -0.0703529   2.85025e-08   rounded rectangle RoundRectXSec_Radius=25.4823 RoundedRect_Height=303.833 RoundedRect_Width=223.391
    38  0.63449      -0.0703472   1.8732e-08    rounded rectangle RoundRectXSec_Radius=25.3708 RoundedRect_Height=303.741 RoundedRect_Width=223.386
    39  0.654796     -0.0703417   1.42204e-07   rounded rectangle RoundRectXSec_Radius=25.2559 RoundedRect_Height=303.648 RoundedRect_Width=223.381
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
Wing "MainWingGeom"
  location (X Y Z) 549.63 0 0, rotation 0 1.83077 0
  symmetric about XZ
  bounding box size 12.4836 150.674 1.45814
  totals: TotalSpan=4571.96 TotalProjectedSpan=4571.96 TotalChord=312.784 TotalArea=1.43003e+06 TotalAR=14.617 MAC=312.784
  root: chord 312.784, twist 0, NACA 4-series Camber=0.0409978 CamberLoc=0.46 ThickChord=0.0969631
  sections:
    n  Span     Root_Chord  Tip_Chord  Area    Sweep  Sweep_Location  Dihedral  Twist  Twist_Location  tip airfoil
    1  1158.81  312.784     312.784    362457  0      0.25            0         0      0.25            as above
    2  1126.17  312.784     312.784    352247  0      0.25            0         0      0.25            as above

Wing "HorizontalTailGeom"
  location (X Y Z) 1681.43 0 0, rotation 0 0.652839 0
  symmetric about XZ
  bounding box size 8.49925 35.6367 0.855074
  totals: TotalSpan=783.712 TotalProjectedSpan=783.712 TotalChord=192.961 TotalArea=151226 TotalAR=4.06151 MAC=192.961
  root: chord 192.961, twist 0, NACA 4-series Camber=0 CamberLoc=0.05 ThickChord=0.0749605
  sections:
    n  Span     Root_Chord  Tip_Chord  Area     Sweep  Sweep_Location  Dihedral  Twist  Twist_Location  tip airfoil
    1  290.35   192.961     192.961    56026.2  0      0.25            0         0      0.25            as above
    2  100.506  192.961     192.961    19393.7  0      0.25            0         0      0.25            as above

Wing "LeftVerticalTailGeom"
  location (X Y Z) 1663.17 -391.856 0, rotation 90 0 0
  bounding box size 10.8509 35.8005 11.2003
  totals: TotalSpan=266 TotalProjectedSpan=266 TotalChord=266 TotalArea=70756 TotalAR=1 MAC=266
  root: chord 266, twist 0, NACA 4-series Camber=0 CamberLoc=0.05 ThickChord=0.0749605
  sections:
    n  Span  Root_Chord  Tip_Chord  Area   Sweep  Sweep_Location  Dihedral  Twist  Twist_Location  tip airfoil
    1  265   266         266        70490  0      0.25            0         0      0.25            as above

Wing "RightVerticalTailGeom"
  location (X Y Z) 1663.17 391.856 0, rotation 90 0 0
  bounding box size 10.8509 35.8005 11.2003
  totals: TotalSpan=266 TotalProjectedSpan=266 TotalChord=266 TotalArea=70756 TotalAR=1 MAC=266
  root: chord 266, twist 0, NACA 4-series Camber=0 CamberLoc=0.05 ThickChord=0.0749605
  sections:
    n  Span  Root_Chord  Tip_Chord  Area   Sweep  Sweep_Location  Dihedral  Twist  Twist_Location  tip airfoil
    1  265   266         266        70490  0      0.25            0         0      0.25            as above
