OpenVSP model (file version 5), 9 components.
Geometry view with OpenVSP parameter names; values to 6 digits, angles in degrees, lengths in the model's unit.

Fuselage ""
  location (X Y Z) 0 0 0, rotation 90 0 0
  Design: Length=977.895
  cross sections:
    n   XLocPercent  YLocPercent  ZLocPercent   shape
    0   0            -0.0694565   -3.59998e-06  rounded rectangle RoundRectXSec_Radius=0.281386 RoundedRect_Height=0.607755 RoundedRect_Width=0.672693
    1   0.00015      -0.0694565   -3.59998e-06  rounded rectangle RoundRectXSec_Radius=1.68832 RoundedRect_Height=3.64653 RoundedRect_Width=4.03616
    2   0.0005       -0.0694565   -3.59998e-06  rounded rectangle RoundRectXSec_Radius=3.65802 RoundedRect_Height=7.90081 RoundedRect_Width=8.74501
    3   0.0012       -0.0694565   -3.59998e-06  rounded rectangle RoundRectXSec_Radius=6.47188 RoundedRect_Height=13.9784 RoundedRect_Width=15.4719
    4   0.00225      -0.0694565   -3.59998e-06  rounded rectangle RoundRectXSec_Radius=9.56713 RoundedRect_Height=20.6637 RoundedRect_Width=22.8716
    5   0.0036       -0.0694565   -3.59998e-06  rounded rectangle RoundRectXSec_Radius=12.0996 RoundedRect_Height=26.1334 RoundedRect_Width=28.9258
    6   0.0045       -0.0694565   -3.59998e-06  rounded rectangle RoundRectXSec_Radius=13.5065 RoundedRect_Height=29.1722 RoundedRect_Width=32.2893
    7   0.005        -0.0694565   -3.59998e-06  rounded rectangle RoundRectXSec_Radius=14.0693 RoundedRect_Height=30.3877 RoundedRect_Width=33.6346
    8   0.115556     -0.0740245   -2.04833e-06  rounded rectangle RoundRectXSec_Radius=21.332 RoundedRect_Height=195.113 RoundedRect_Width=112.781
    9   0.226111     -0.0779168   1.11815e-06   rounded rectangle RoundRectXSec_Radius=23.4182 RoundedRect_Height=278.921 RoundedRect_Width=162.72
    10  0.336667     -0.080125    -8.85117e-07  rounded rectangle RoundRectXSec_Radius=24.816 RoundedRect_Height=305.075 RoundedRect_Width=192.555
    11  0.447222     -0.0768082   4.08515e-08   rounded rectangle RoundRectXSec_Radius=25.2544 RoundedRect_Height=304.427 RoundedRect_Width=210.764
    12  0.557778     -0.0704377   4.17971e-08   rounded rectangle RoundRectXSec_Radius=25.7429 RoundedRect_Height=304.068 RoundedRect_Width=223.271
    13  0.668333     -0.0703381   1.9987e-07    rounded rectangle RoundRectXSec_Radius=25.1766 RoundedRect_Height=303.586 RoundedRect_Width=223.377
    14  0.778889     -0.0703113   0             rounded rectangle RoundRectXSec_Radius=24.4357 RoundedRect_Height=303.032 RoundedRect_Width=223.344
    15  0.889444     -0.0669106   1.39862e-06   rounded rectangle RoundRectXSec_Radius=24.3452 RoundedRect_Height=266.209 RoundedRect_Width=216.416
    16  1            -0.00699542  3.59552e-08   rounded rectangle RoundRectXSec_Radius=20.8468 RoundedRect_Height=111.631 RoundedRect_Width=97.5654

Wing "MainWingGeom"
  location (X Y Z) 549.63 0 0, rotation 0 1.83077 0
  symmetric about XZ
  bounding box size 12.4836 150.674 1.45814
  totals: TotalSpan=4571.96 TotalProjectedSpan=4571.96 TotalChord=312.784 TotalArea=1.43003e+06 TotalAR=14.617 MAC=312.784
  root: chord 312.784, twist 0, NACA 4-series Camber=0.0409978 CamberLoc=0.46 ThickChord=0.0969631
  sections:
    n  Span     Root_Chord  Tip_Chord  Area    Sweep  Sweep_Location  Dihedral  Twist  Twist_Location  tip airfoil
    1  1158.81  312.784     312.784    362457  0      0.25            0         0      0.25            as above
    2  1126.17  312.784     312.784    352247  0      0.25            0         0      0.25            as above

Wing "HorizontalTailGeom"
  location (X Y Z) 1681.43 0 0, rotation 0 0.652839 0
  symmetric about XZ
  bounding box size 8.49925 35.6367 0.855074
  totals: TotalSpan=783.712 TotalProjectedSpan=783.712 TotalChord=192.961 TotalArea=151226 TotalAR=4.06151 MAC=192.961
  root: chord 192.961, twist 0, NACA 4-series Camber=0 CamberLoc=0.05 ThickChord=0.0749605
  sections:
    n  Span     Root_Chord  Tip_Chord  Area     Sweep  Sweep_Location  Dihedral  Twist  Twist_Location  tip airfoil
    1  290.35   192.961     192.961    56026.2  0      0.25            0         0      0.25            as above
    2  100.506  192.961     192.961    19393.7  0      0.25            0         0      0.25            as above

Wing "LeftUpperVerticalTailGeom"
  location (X Y Z) 1663.17 -391.856 0, rotation 90 0 0
  bounding box size 10.8509 35.8005 11.2003
  totals: TotalSpan=266 TotalProjectedSpan=266 TotalChord=183 TotalArea=48678 TotalAR=1.45355 MAC=183
  root: chord 266, twist 0, NACA 4-series Camber=0 CamberLoc=0.05 ThickChord=0.0749605
  sections:
    n  Span  Root_Chord  Tip_Chord  Area   Sweep  Sweep_Location  Dihedral  Twist  Twist_Location  tip airfoil
    1  265   266         100        48495  10     0.25            0         0      0.25            as above

Wing "LeftLowerVerticalTailGeom"
  location (X Y Z) 1663.17 -391.856 0, rotation -90 0 0
  bounding box size 10.8509 35.8005 11.2003
  totals: TotalSpan=266 TotalProjectedSpan=266 TotalChord=266 TotalArea=70756 TotalAR=1 MAC=266
  root: chord 266, twist 0, NACA 4-series Camber=0 CamberLoc=0.05 ThickChord=0.0749605
  sections:
    n  Span  Root_Chord  Tip_Chord  Area   Sweep  Sweep_Location  Dihedral  Twist  Twist_Location  tip airfoil
    1  265   266         266        70490  0      0.25            0         0      0.25            as above

Wing "RightUpperVerticalTailGeom"
  location (X Y Z) 1663.17 391.856 0, rotation 90 0 0
  bounding box size 10.8509 35.8005 11.2003
  totals: TotalSpan=266 TotalProjectedSpan=266 TotalChord=183 TotalArea=48678 TotalAR=1.45355 MAC=183
  root: chord 266, twist 0, NACA 4-series Camber=0 CamberLoc=0.05 ThickChord=0.0749605
  sections:
    n  Span  Root_Chord  Tip_Chord  Area   Sweep  Sweep_Location  Dihedral  Twist  Twist_Location  tip airfoil
    1  265   266         100        48495  10     0.25            0         0      0.25            as above

Wing "RightLowerVerticalTailGeom"
  location (X Y Z) 1663.17 391.856 0, rotation -90 0 0
  bounding box size 10.8509 35.8005 11.2003
  totals: TotalSpan=266 TotalProjectedSpan=266 TotalChord=266 TotalArea=70756 TotalAR=1 MAC=266
  root: chord 266, twist 0, NACA 4-series Camber=0 CamberLoc=0.05 ThickChord=0.0749605
  sections:
    n  Span  Root_Chord  Tip_Chord  Area   Sweep  Sweep_Location  Dihedral  Twist  Twist_Location  tip airfoil
    1  265   266         266        70490  0      0.25            0         0      0.25            as above

Fuselage ""
  location (X Y Z) 627.826 -250 0, rotation 0 0 0
  Design: Length=1101.84
  cross sections:
    n  XLocPercent  YLocPercent  ZLocPercent  shape
    0  0            0            0            circle Circle_Diameter=254
    1  0.05         0            0            as above
    2  0.95         0            0            as above
    3  1            0            0            as above

Fuselage ""
  location (X Y Z) 627.826 250 0, rotation 0 0 0
  Design: Length=1101.84
  cross sections:
    n  XLocPercent  YLocPercent  ZLocPercent  shape
    0  0            0            0            circle Circle_Diameter=254
    1  0.05         0            0            as above
    2  0.95         0            0            as above
    3  1            0            0            as above
